*Heading
Input file for elastic UMAT
*Node
1, 0.,0.,0.
31,1.0,0.,0.
931,0.,1.0,0.
961,1.0,1.0,0.0
*NGEN,NSET=x
1,31,1
*NGEN,NSET=x1
931,961,1
*NFILL,NSET=P1
x,x1,30,31
*NCOPY,CHANGE NUMBER=28830,OLD SET=P1,SHIFT,NEW SET= P2
0.0,0.0,1.0
0.0,0.0,0.0
*NFILL,NSET=ALL
P1,P2,30,961
*ELEMENT,TYPE=C3D8
1,2,1,962,963,33,32,993,994
*Nset, nset=xmaster
31
*Nset, nset=xslave,generate
   992  , 28861  , 961
    62  , 28892  , 961
    93  , 28923  , 961
   124  , 28954  , 961
   155  , 28985  , 961
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   961  , 29791  , 961
*Nset, nset=xsym,generate
     1  , 28831  , 961
    32  , 28862  , 961
    63  , 28893  , 961
    94  , 28924  , 961
   125  , 28955  , 961
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   931  , 29761  , 961
*Nset, nset=ymaster
931
*Nset, nset=yslave,generate
   932  ,   961  ,   1
  1892  ,  1922  ,   1
  2853  ,  2883  ,   1
  3814  ,  3844  ,   1
  4775  ,  4805  ,   1
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 29761  , 29791  ,   1
*Nset, nset=ysym,generate
     1  ,    31  ,   1
   962  ,   992  ,   1
  1923  ,  1953  ,   1
  2884  ,  2914  ,   1
  3845  ,  3875  ,   1
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 28831  , 28861  ,   1
*Nset, nset=zmaster
28831
*Nset, nset=zslave,generate
28832,29791,1
*Nset, nset=zsym,generate
1,961,1
*ELGEN,ELSET=ALL
 1,          30 ,1,1,          30 ,          31 ,          30 ,          30 ,         961 ,         900
***NODE,NSET=ALL,generate
**1 , 132651 ,1
**ELEMENT,ELSET=ALL,generate
**1, 12500, 1
** Constraint: Constraint-1
*Equation
2
XSLAVE, 1, 1.
XMASTER, 1, -1.
** Constraint: Constraint-2
*Equation
2
YSLAVE, 2, 1.
YMASTER, 2, -1.
** Constraint: Constraint-3
*Equation
2
ZSLAVE, 3, 1.
ZMASTER, 3, -1.
*SOLID SECTION,MATERIAL=Material-1,ELSET=ALL
*Material, name=Material-1
** Elastic constants of Copper
*User Material, constants=3
*** Elastic constants of Copper
168000.,121400., 75400.
*** Elastic constants of Aluminium
**106750,60410,28340
*DEPVAR
 3
*INITIAL CONDITIONS,TYPE=SOLUTION,USER
*Step, name=Step-1
*Static
1., 1., 1e-05, 1.
*Boundary
XSYM, 1, 1
*Boundary
YSYM, 2, 2
*Boundary
ZSYM, 3, 3
*Boundary
ZMASTER, 3, 3, .0025
*Output, field
*Element Output
E, S, SDV1,SDV2,SDV3,IVOL
*NODE OUTPUT
U, RF
*Output, history, variable=PRESELECT
*End Step
